# Required import for SOFA within python
import Sofa
import Sofa.Core
import Sofa.Simulation
import Sofa.Gui

# -*- coding: utf-8 -*-
import os

path = os.path.dirname(os.path.abspath(__file__)) + '/mesh/'

# For the controller
import numpy as np


def main():
        # Call the SOFA function to create the root node
        root = Sofa.Core.Node("root")

        # Call the createScene function, as runSofa does
        createScene(root)

        # Once defined, initialization of the scene graph
        Sofa.Simulation.init(root)

        # Launch the GUI (qt or qglviewer)
        Sofa.Gui.GUIManager.Init("myscene", "qglviewer")
        Sofa.Gui.GUIManager.createGUI(root, __file__)
        Sofa.Gui.GUIManager.SetDimension(1080, 800)

        # Initialization of the scene will be done here
        Sofa.Gui.GUIManager.MainLoop(root)
        Sofa.Gui.GUIManager.closeGUI()
        print("Closed GUI")


def createScene(rootNode):
    rootNode.addObject('RequiredPlugin',
                       pluginName='SoftRobots SoftRobots.Inverse')
    rootNode.addObject('VisualStyle',
                       displayFlags='showVisualModels hideBehaviorModels showCollisionModels '
                                    'hideBoundingCollisionModels hideForceFields showInteractionForceFields '
                                    'hideWireframe')

    rootNode.addObject('FreeMotionAnimationLoop')
    rootNode.addObject('QPInverseProblemSolver', printLog=False)

    rootNode.gravity = [0, -9180, 0]

    ##########################################
    # FEM Model                              #
    ##########################################
    finger = rootNode.addChild('finger')
    finger.addObject('EulerImplicitSolver', firstOrder=True, rayleighMass=0.1, rayleighStiffness=0.1)
    finger.addObject('SparseLDLSolver', template="CompressedRowSparseMatrixMat3x3d")
    finger.addObject('MeshVTKLoader', name='loader', filename=path + 'finger.vtk')
    finger.addObject('MeshTopology', src='@loader', name='container')
    finger.addObject('MechanicalObject')
    finger.addObject('UniformMass', totalMass=0.075)
    finger.addObject('TetrahedronFEMForceField', poissonRatio=0.3, youngModulus=600)
    finger.addObject('BoxROI', name='ROI1', box=[-15, 0, 0, 5, 10, 15], drawBoxes=True)
    finger.addObject('RestShapeSpringsForceField', points='@ROI1.indices', stiffness=1e12)
    finger.addObject('LinearSolverConstraintCorrection')

    ##########################################
    # Visualization                          #
    ##########################################
    fingerVisu = finger.addChild('visu')
    fingerVisu.addObject('MeshSTLLoader', filename=path + "finger.stl", name="loader")
    fingerVisu.addObject('OglModel', src="@loader", template='Vec3', color=[0.0, 0.7, 0.7, 1])
    fingerVisu.addObject('BarycentricMapping')

    ##########################################
    # Cable                                  #
    ##########################################
    cable = finger.addChild('cable')
    cable.addObject('MechanicalObject',
                    position=[
                        [-17.5, 12.5, 2.5],
                        [-32.5, 12.5, 2.5],
                        [-47.5, 12.5, 2.5],
                        [-62.5, 12.5, 2.5],
                        [-77.5, 12.5, 2.5],

                        [-83.5, 12.5, 4.5],
                        [-85.5, 12.5, 6.5],
                        [-85.5, 12.5, 8.5],
                        [-83.5, 12.5, 10.5],

                        [-77.5, 12.5, 12.5],
                        [-62.5, 12.5, 12.5],
                        [-47.5, 12.5, 12.5],
                        [-32.5, 12.5, 12.5],
                        [-17.5, 12.5, 12.5]
                    ])

    # Set a maximum displacement for your cable
    cable.addObject('CableActuator', name="aCable",
                    indices=list(range(0, 14)),
                    pullPoint=[0.0, 12.5, 2.5],
                    maxPositiveDisp=40,
                    maxDispVariation=0.5,
                    minForce=0)

    cable.addObject('BarycentricMapping')

    ##########################################
    # Effector goal for interactive control  #
    ##########################################
    goal = rootNode.addChild('goal')
    goal.addObject('EulerImplicitSolver', firstOrder=True)
    goal.addObject('CGLinearSolver', iterations=100, tolerance=1e-5, threshold=1e-5)
    goal.addObject('MechanicalObject', name='goalMO',
                   position=[-120, 7, 7])
    goal.addObject('SphereCollisionModel', radius=5)
    goal.addObject('UncoupledConstraintCorrection')

    ##########################################
    # Effector                               #
    ##########################################
    effector = finger.addChild('fingertip')
    effector.addObject('MechanicalObject', position=([-103, 7, 7]))
    effector.addObject('PositionEffector', template='Vec3',
                       indices=0,
                       effectorGoal="@../../goal/goalMO.position")
    effector.addObject('BarycentricMapping', mapForces=False, mapMasses=False)

    print("****** Adding the controller ******")
    goal.addObject(GoalPositionController(goal.goalMO))
    print("******************")
    return rootNode


class Vector3:
    def __init__(self, x=0, y=0, z=0):
        self.x = x
        self.y = y
        self.z = z

    def as_list(self):
        return [self.x, self.y, self.z]

    def set(self, x, y, z):
        self.x = x
        self.y = y
        self.z = z

    def __repr__(self):
        return f"Vector3(x={self.x}, y={self.y}, z={self.z})"


class GoalPositionController(Sofa.Core.Controller):
    def __init__(self, goal_obj, axis='y', min_theta_range=-np.pi/4, max_theta_range=np.pi/4, step=0.1):
        Sofa.Core.Controller.__init__(self)
        self.goal = goal_obj
        self.axis = axis
        self.min_theta_range = min_theta_range
        self.max_theta_range = max_theta_range
        self.theta_vals = np.linspace(min_theta_range, max_theta_range, 100)
        self.step = step
        self.init_position = goal_obj.position.value[0]
        self.goal_controller_position = Vector3(self.init_position[0], self.init_position[1], self.init_position[2])
        self.direction = 1
        self.radius = 1
        self.theta = 0.0
        self.speed = 0.01

    def onAnimateBeginEvent(self, event):
        self.theta += self.speed

        if self.theta < self.min_theta_range or self.theta > self.max_theta_range:
            self.direction *= -1
            self.theta += self.speed * self.direction

        new_x = self.goal_controller_position.x + self.radius * np.cos(-1 * self.theta + np.pi)
        new_y = self.goal_controller_position.y + self.radius * np.sin(self.theta + np.pi)
        new_z = self.goal_controller_position.z

        self.goal_controller_position.set(new_x, new_y, new_z)
        self.goal.position.value = [self.goal_controller_position.as_list()]
        print(self.goal_controller_position)

    # def onAnimateBeginEvent(self, event):
    #     # Moving along circle
    #     self.goal_controller_position.x = self.radius*np.cos(-)

    #     if self.axis == 'y':
    #         self.current_val += self.step * self.direction

    #         if self.current_val > self.max_val or self.current_val < self.min_val:
    #             self.direction *= -1
    #             self.current_val += self.step * self.direction

    #         new_position = list(self.goal.position.value[0])
    #         new_position[1] = self.current_val
    #         self.goal.position.value = [new_position]


# Function used only if this script is called from a python environment
if __name__ == '__main__':
    main()
